mass := 0.175 kg
gravity := 9.7935 m/s^2
wettedArea := 0.057 m^2
diameter := (2*sqrt(wettedArea/π)) m
ρ := 1.23 kg/m^3
I_a := 0.002352 kg*m^2
I_d := 0.001219 kg*m^2
CM_q := -0.0144
CR_p := -0.0125
CN_r := -0.0000341
CL_0 := 0.3331
CL_α := 1.9124
CD_0 := 0.1769
CD_α := 0.685
CM_0 := -0.0821
CM_α := 0.4338
CR_r := 0.00171
xprime(List, t) :=
    x ← List(1)
    y ← List(2)
    z ← List(3)
    V_x ← List(4)
    V_y ← List(5)
    V_z ← List(6)
    ϕ ← List(7)
    θ ← List(8)
    γ ← List(9)
    V_ϕ ← List(10)
    V_θ ← List(11)
    V_γ ← List(12)
    TransMat ← [cos(θ), sin(θ)*sin(ϕ), -sin(θ)*cos(ϕ); 0, cos(ϕ), sin(ϕ); sin(θ), -cos(θ)*sin(ϕ), cos(θ)*cos(ϕ)]
    V ← [V_x, V_y, V_z]
    V_fz ← V*TransMat[:, 2]
    V_fxy ← V - V_fz*TransMat[:, 2]
    α ← atan(V_fz/||V_fxy||)
    Q ← wettedArea*ρ*||V||^2/2
    U_v ← V/||V||
    U_fxy ← V_fxy/||V_fxy||
    U_lat ← TransMat[2, :]×U_fxy
    ω_f ← [V_ϕ*cos(θ), V_θ, V_ϕ*sin(θ) + V_γ]
    ω_e ← transpose(TransMat)*transpose(ω_f)
    ω_fxy ← ω_e*U_fxy
    ω_lat ← ω_e*U_lat
    ω_spin ← ω_e*TransMat[2, :]
    advancedRotation ← diameter*ω_spin/(2*||V||)
    CL ← CL_0 + CL_α*α
    α_0 ← -CL_0/CL_α
    CD ← CD_0 + CD_α*(α - α_0)^2
    CM ← CM_0 + CM_α*α
    M_fxy ← Q*diameter*(sqrt(diameter/gravity)*CR_r*ω_spin + CR_p*ω_fxy)*U_fxy
    Lift ← CL*Q
    Drag ← CD*Q
    ulift ← -U_v×U_lat
    udrag ← -U_v
    F_aero ← (Lift*ulift) + (Drag*udrag)
    F_g ← [0, 0, mass*gravity]
    F ← transpose(F_aero) + F_g
    M_lat ← Q*diameter*(CM + CM_q*ω_lat)*U_lat
    M_spin ← [0, 0, CN_r(ω_spin)]
    M ← TransMat*transpose(M_fxy) + TransMat*transpose(M_lat) + transpose(M_spin)
    Derivative ← [
        V_x;
        V_y;
        V_z;
        F[:, 0]/mass;
        F[:, 1]/mass;
        F[:, 2]/mass;
        V_ϕ;
        V_θ;
        V_γ;
        M[0, :] + I_d*V_θ*V_ϕ*sin(θ);
        M[1, :];
        M[2, :]
    ]
