mass := 0.175 kg
gravity := 9.7935 m/s^2
wettedArea := 0.057 m^2
diameter := 2*sqrt(wettedArea/π)
ρ := 1.23 kg/m^3
I_a := 0.002352 kg*m^2
I_d := 0.001219 kg*m^2
CM_q := -0.0144
CR_p := -0.0125
CN_r := -0.0000341
CL_0 := 0.3331
CL_α := 1.9124
CD_0 := 0.1769
CD_α := 0.685
X := [-0.903; -0.633; -0.913; 13.4; -.411; 0.00112; -0.0711; 0.211; 5.03; -14.9; -1.48; 54.3]
CM_0 := -0.0821
CM_α := 0.4338
CR_r := 0.00171
xprime(t, X) :=
    x ← X(0)
    y ← X(1)
    z ← X(2)
    V_x ← X(3)
    V_y ← X(4)
    V_z ← X(5)
    ϕ ← X(6)
    θ ← X(7)
    γ ← X(8)
    V_ϕ ← X(9)
    V_θ ← X(10)
    V_γ ← X(11)
    TransMat ← [cos(θ), sin(θ)*sin(ϕ), -sin(θ)*cos(ϕ); 0, cos(ϕ), sin(ϕ); sin(θ), -cos(θ)*sin(ϕ), cos(θ)*cos(ϕ)]
    V ← [V_x, V_y, V_z]
    V_fz ← V*TransMat[:, 2]
    V_fxy ← V - V_fz*TransMat[:, 2]
    α ← atan(V_fz/||V_fxy||)
    Q ← wettedArea*ρ*||V||^2/2
    U_v ← V/||V||
    U_fxy ← V_fxy/||V_fxy||
    U_lat ← TransMat[2, :]×U_fxy
    ω_f ← [V_ϕ*cos(θ), V_θ, V_ϕ*sin(θ) + V_γ]
    ω_e ← transpose(TransMat)*transpose(ω_f)
    ω_fxy ← ω_e*U_fxy
    ω_lat ← ω_e*U_lat
    ω_spin ← ω_e*TransMat[2, :]
    advancedRotation ← diameter*ω_spin/(2*||V||)
    CL ← CL_0 + CL_α*α
    α_0 ← -CL_0/CL_α
    CD ← CD_0 + CD_α*(α - α_0)^2
    CM ← CM_0 + CM_α*α
    M_fxy ← Q*diameter*(sqrt(diameter/gravity)*CR_r*ω_spin + CR_p*ω_fxy)*U_fxy
    Lift ← CL*Q
    Drag ← CD*Q
    ulift ← -U_v×U_lat
    udrag ← -U_v
    F_aero ← (Lift*ulift) + (Drag*udrag)
    F_g ← [0, 0, mass*gravity]
    F ← transpose(F_aero) + F_g
    M_lat ← Q*diameter*(CM + CM_q*ω_lat)*U_lat
    M_spin ← [0, 0, CN_r(ω_spin)]
    M ← TransMat*transpose(M_fxy) + TransMat*transpose(M_lat) + transpose(M_spin)
    A_ϕ ← (M(0) + I_d*V_θ*V_ϕ*sin(θ) - I_a*V_θ*(V_ϕ*sin(θ) + V_γ) + I_d*V_θ*V_ϕ*sin(θ))/(I_d/cos(θ))
    Derivative ← [
        V_x;
        V_y;
        V_z;
        F[:, 0]/mass;
        F[:, 1]/mass;
        F[:, 2]/mass;
        V_ϕ;
        V_θ;
        V_γ;
        A_ϕ;
        (M(1) + I_a*V_ϕ*cos(θ)*(V_ϕ*sin(θ) + V_γ) - I_d*V_ϕ*V_ϕ*cos(θ)*sin(θ))/I_d;
        (M(2) - I_a*(A_ϕ*sin(θ) + V_θ*V_ϕ*cos(θ)))/I_a
    ]
    return Derivative  # error: This is a premium feature. To use this and other premium features, please upgrade to a full license using the 'Upgrade' button.
x := X(0) m
y := X(1) m
z := X(2) m
V_x := X(3) m/s
V_y := X(4) m/s
V_z := X(5) m/s
ϕ := X(6) rad
θ := X(7) rad
γ := X(8) rad
V_ϕ := X(9) rad/s
V_θ := X(10) rad/s
V_γ := X(11) rad/s
TransMat := [cos(θ), sin(θ)*sin(ϕ), -sin(θ)*cos(ϕ); 0, cos(ϕ), sin(ϕ); sin(θ), -cos(θ)*sin(ϕ), cos(θ)*cos(ϕ)]
V := [V_x, V_y, V_z]
V_fz := V*TransMat[:, 2]
V_fxy := V - V_fz*transpose(TransMat[:, 2])
α := atan(V_fz/|transpose(V_fxy)|) rad
Q := wettedArea*ρ*||transpose(V)||^2/2
U_v := V/||transpose(V)||
U_fxy := V_fxy/||transpose(V_fxy)||
||transpose(V)||^2 = 179.729 m^2/s^2
U_lat := transpose(TransMat)[:, 2]×transpose(U_fxy)
ω_f := [V_ϕ*cos(θ), V_θ, V_ϕ*sin(θ) + V_γ]
ω_e := transpose(TransMat)*transpose(ω_f)
ω_fxy := ω_e*transpose(U_fxy)
ω_lat := (ω_e*U_lat) s
ω_f = [-14.5695, -1.48, 51.1794] 1/s
ω_spin := ω_e*transpose(TransMat)[:, 2]
V_ϕ = -14.9 1/s
advancedRotation := diameter*ω_spin/(2*||transpose(V)||)
CL := CL_0 + CL_α*α
α_0 := -CL_0/CL_α
CD := CD_0 + CD_α*(α - α_0)^2
temp := CR_p*ω_fxy
CM := CM_0 + CM_α*α
M_fxy := Q*diameter*(sqrt(diameter/gravity)*(CR_r*ω_spin + CR_p*ω_fxy))*U_fxy
Lift := CL*Q
Drag := CD*Q
ulift := -transpose(U_v)×U_lat
udrag := -transpose(U_v)
F_aero := (Lift*ulift) + (Drag*udrag)
F_g := [0, 0, mass*gravity]
F := transpose(F_aero) + F_g
F_g = [0, 0, 1.71386] N
CM + CM_q*|ω_lat| = -0.204584
transpose(F_aero) = [-1.11803, 0.0659763, 0.371931] N
CM_q*|ω_lat| = -0.0322327
M_lat := Q*diameter*(CM + CM_q*ω_lat)*U_lat
ω_lat = -2.23838
M_spin := [0, 0, CN_r*ω_spin]
M := TransMat*transpose(M_fxy) + TransMat*M_lat + transpose(M_spin)  # error: These units are not compatible.
transpose(M_spin) = [0; 0; -0.00174522] 1/s
CM_q = -0.0144
M_fxy = [-0.00129072, 6.1178e-5, -0.000272002] J
M_lat = [-0.0141497; -0.216474; 0.0184556] J
# Problems with Units here
TransMat*M_lat = [-0.0144706; -0.217238; 0] J
M_spin = [0, 0, -0.00174522] 1/s
M_fxy*TransMat = [-0.00131907, 6.13329e-5, 0] J
A_ϕ := (M(0) + I_d*V_θ*V_ϕ*sin(θ) - I_a*V_θ*(V_ϕ*sin(θ) + V_γ) + I_d*V_θ*V_ϕ*sin(θ))/(I_d/cos(θ))  # error: This variable is undefined. Check that the label is set correctly.
D(t, X) := xprime(t, X)  # error: This variable is undefined. Check that the label is set correctly.
X(t) == [x1(t); x2(t); x3(t); x4(t); x5(t); x6(t); x7(t); x8(t); x9(t); x10(t); x11(t); x12(t)]
init := [-0.903; -0.633; -0.913; 13.4; -.411; 0.00112; -0.0711; 0.211; 5.03; -14.9; -1.48; 54.3]
xprime(3, init) =  # error: This variable is undefined. Check that the label is set correctly.
T_i := 0
init(0) = -0.903
T_f := 10
N := 100
Sol := AdamsBDF(init, T_i, T_f, N, D)  # error: This variable is undefined. Check that the label is set correctly.
