mass := 0.175 kg
gravity := 9.7935 m/s^2
wettedArea := 0.057 m^2
diameter := 2*sqrt(wettedArea/π)
ρ := 1.23 kg/m^3
I_a := 0.002352 kg*m^2
I_d := 0.001219 kg*m^2
CM_q := -0.0144 s
CR_p := -0.0125
CN_r := -0.0000341 N*m*s
CL_0 := 0.3331
CL_α := 1.9124
CD_0 := 0.1769
CD_α := 0.685
CM_0 := -0.0821
CM_α := 0.4338
CR_r := 0.00171
xprime(t, X) :=
    x ← X(0) m
    y ← X(1) m
    z ← X(2) m
    V_x ← X(3) m/s
    V_y ← X(4) m/s
    V_z ← X(5) m/s
    ϕ ← X(6) rad
    θ ← X(7) rad
    γ ← X(8) rad
    V_ϕ ← X(9) rad/s
    V_θ ← X(10) rad/s
    V_γ ← X(11) rad/s
    TransMat ← [cos(θ), sin(θ)*sin(ϕ), -sin(θ)*cos(ϕ); 0, cos(ϕ), sin(ϕ); sin(θ), -cos(θ)*sin(ϕ), cos(θ)*cos(ϕ)]
    V ← [V_x, V_y, V_z]
    V_fz ← V*TransMat[:, 2]
    V_fxy ← V - V_fz*transpose(TransMat[:, 2])
    α ← atan(V_fz/||transpose(V_fxy)||)
    Q ← wettedArea*ρ*||transpose(V)||^2/2
    U_v ← V/||transpose(V)||
    U_fxy ← V_fxy/||transpose(V_fxy)||
    U_lat ← transpose(TransMat)[:, 2]×transpose(U_fxy)
    ω_f ← [V_ϕ*cos(θ), V_θ, V_ϕ*sin(θ) + V_γ]
    ω_e ← transpose(TransMat)*transpose(ω_f)
    ω_fxy ← ω_e*transpose(U_fxy)
    ω_lat ← ω_e*U_lat
    ω_spin ← ω_e*transpose(TransMat)[:, 2]
    advancedRotation ← diameter*ω_spin/(2*||transpose(V)||)
    CL ← CL_0 + CL_α*α
    α_0 ← -CL_0/CL_α
    CD ← CD_0 + CD_α*(α - α_0)^2
    CM ← CM_0 + CM_α*α
    M_fxy ← Q*diameter*(sqrt(diameter/gravity)*CR_r*ω_spin + CR_p*ω_fxy)*U_fxy
    Lift ← CL*Q
    Drag ← CD*Q
    ulift ← -transpose(U_v)×U_lat
    udrag ← -transpose(U_v)
    F_aero ← (Lift*ulift) + (Drag*udrag)
    F_g ← [0, 0, mass*gravity]
    F ← transpose(F_aero) + F_g
    M_lat ← Q*diameter*(CM + CM_q*ω_lat)*U_lat
    M_spin ← [0, 0, CN_r(ω_spin)]
    M ← TransMat*transpose(M_fxy) + TransMat*transpose(M_lat) + transpose(M_spin)
    A_ϕ ← (M(0) + I_d*V_θ*V_ϕ*sin(θ) - I_a*V_θ*(V_ϕ*sin(θ) + V_γ) + I_d*V_θ*V_ϕ*sin(θ))/(I_d/cos(θ))
    Derivative ← [
        V_x;
        V_y;
        V_z;
        F[:, 0]/mass;
        F[:, 1]/mass;
        F[:, 2]/mass;
        V_ϕ;
        V_θ;
        V_γ;
        A_ϕ;
        (M(1) + I_a*V_ϕ*cos(θ)*(V_ϕ*sin(θ) + V_γ) - I_d*V_ϕ*V_ϕ*cos(θ)*sin(θ))/I_d;
        (M(2) - I_a*(A_ϕ*sin(θ) + V_θ*V_ϕ*cos(θ)))/I_a
    ]
    return Derivative
X(t) == [x1(t); x2(t); x3(t); x4(t); x5(t); x6(t); x7(t); x8(t); x9(t); x10(t); x11(t); x12(t)]
D(t, X) := xprime(t, X)
init := [-0.903; -0.633; -0.913; 13.4; -.411; 0.00112; -0.0711; 0.211; 5.03; -14.9; -1.48; 54.3]
T_i := 0
T_f := 10
xprime(3, init) =  # error: These units are not compatible.
N := 100
init(0) = -0.903
Sol := AdamsBDF(init, T_i, T_f, N, D)  # error: These units are not compatible.
