D(t, X) := [X[1]; -3*X[0] - 0.5*X[1] + Φ(t)]
X(t) == [x1(t); x2(t)]
init := [0; 0]
T_i := 0
T_f := 30
N := 500
Sol := AdamsBDF(init, T_i, T_f, N, D)
Sol = [
    0, 0, 0;
    0.06, 0.00178087, 0.0590034;
    0.12, 0.0070329, 0.115635;
    0.18, 0.0155984, 0.169365;
    0.24, 0.0272887, 0.219705;
    0.3, 0.041887, 0.266222;
    0.36, 0.0591517, 0.308534;
    0.42, 0.0788207, 0.346316;
    0.48, 0.100614, 0.3793;
    0.54, 0.124237, 0.407277
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]
t := Sol[:, 0]
x := Sol[:, 1]
# [plot: x vs t]
